*INCLUDE, INPUT=Solid/all.msh
*INCLUDE, INPUT=Solid/fixed.nam
*INCLUDE, INPUT=Solid/interface.nam

*MATERIAL, Name=EL
*ELASTIC
 2000000, 0.3
*DENSITY
 3000

*SOLID SECTION, Elset=Eall, Material=EL
*STEP, NLGEOM, INC=1000000
*DYNAMIC
1.E-5, 0.01

*BOUNDARY
Nfixed, 1, 3

*CLOAD
 Ninterface, 1, 0.0
 Ninterface, 2, 0.0
 Ninterface, 3, 0.0

*NODE FILE
 U
*EL FILE
 S, E
*END STEP
